f_0 := 3
λ_0 := 30/f_0
k := 2*π/λ_0
F(θ, θ_0, X) := 1/rows(X)*sum(e^(-1i*k*X[n]*sin(θ))*e^(1i*k*X[n]*sin(θ_0)), n = 0 .. rows(X) - 1)
F(θ, θ_0, X) := 1/rows(X)*sum(e^(-1i*k*X[n]*(sin(θ) - sin(θ_0))), n = 0 .. rows(X) - 1)
# [component: outputs DN]
Θ := DN[:, 0]
FF := DN[:, 3]
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